<?xml version="1.0" encoding="ISO-8859-1"?>
<neuroml xmlns="http://www.neuroml.org/schema/neuroml2" xmlns:xsi="http://www.w3.org/2001/XMLSchema-instance" xsi:schemaLocation="http://www.neuroml.org/schema/neuroml2 https://raw.github.com/NeuroML/NeuroML2/development/Schemas/NeuroML2/NeuroML_v2beta4.xsd" id="cad">

    <notes/>

    <decayingPoolConcentrationModel id="cad" restingConc="1e-10mol_per_cm3" decayConstant="80ms" ion="ca" shellThickness="0.1e-4cm"/>

</neuroml>
