<?xml version="1.0" encoding="ISO-8859-1"?>

<!--
       This file has been generated by neuroConstruct because a cell mechanism (ChannelMLCell Mechanism [InstanceName: na, channelMLFile: NaChannel.xml])
      has a different set of parameters (tauh_scale = 1.0, taum_scale = 1.0, vshifth = -9.60842, vshiftm = -10.9975) on a group of sections.

      Conversion of the original NML2 file to use the updated parameters is implemented in handleExtraParamsForNml2()
      in https://github.com/NeuralEnsemble/neuroConstruct/blob/master/src/ucl/physiol/neuroconstruct/neuroml/NeuroMLFileManager.java
      See that file to check/improve this conversion
-->

<neuroml xmlns="http://www.neuroml.org/schema/neuroml2" xmlns:xsi="http://www.w3.org/2001/XMLSchema-instance" xsi:schemaLocation="http://www.neuroml.org/schema/neuroml2 https://raw.github.com/NeuroML/NeuroML2/development/Schemas/NeuroML2/NeuroML_v2beta4.xsd" id="na__tauh_scale1__taum_scale1__vshifthmin9_60842__vshiftmmin10_9975">

    <notes>ChannelML file containing a single Na Channel description from a cortical layer V pyramidal neuron, described in Keren, N., Peled, N., and Korngreen, A. (2005). Constraining compartmental models using multiple voltage recordings and genetic algorithms. Journal of neurophysiology, 94(6), 3730-42.</notes>

    <ionChannel id="na__tauh_scale1__taum_scale1__vshifthmin9_60842__vshiftmmin10_9975" conductance="10pS" type="ionChannelHH" species="na">

        <notes/>

        <annotation>
            <rdf:RDF xmlns:rdf="http://www.w3.org/1999/02/22-rdf-syntax-ns#">
                <rdf:Description rdf:about="na">

                    <bqmodel:isDescribedBy xmlns:bqmodel="http://biomodels.net/model-qualifiers/">
                        <rdf:Bag>
                            <rdf:li>Keren, N., Peled, N., and Korngreen, A. (2005). Constraining compartmental models using multiple voltage recordings and genetic algorithms. Journal of neurophysiology, 94(6), 3730-42</rdf:li>
                            <rdf:li rdf:resource="http://www.ncbi.nlm.nih.gov/pubmed/16093338"/>
                        </rdf:Bag>
                    </bqmodel:isDescribedBy>

                </rdf:Description>
            </rdf:RDF>
        </annotation>

        <gate id="m" type="gateHHtauInf" instances="3">
            <q10Settings type="q10ExpTemp" q10Factor="2.3" experimentalTemp="21 degC"/>
            <timeCourse type="na__tauh_scale1__taum_scale1__vshifthmin9_60842__vshiftmmin10_9975__tauh_scale1__taum_scale1__vshifthmin9_60842__vshiftmmin10_9975__tauh_scale1__taum_scale1__vshifthmin9_60842__vshiftmmin10_9975__tauh_scale1__taum_scale1__vshifthmin9_60842__vshiftmmin10_9975_m_tau_tau"/>
            <steadyState type="na__tauh_scale1__taum_scale1__vshifthmin9_60842__vshiftmmin10_9975__tauh_scale1__taum_scale1__vshifthmin9_60842__vshiftmmin10_9975__tauh_scale1__taum_scale1__vshifthmin9_60842__vshiftmmin10_9975__tauh_scale1__taum_scale1__vshifthmin9_60842__vshiftmmin10_9975_m_inf_inf"/>
        </gate>

        <gate id="h" type="gateHHtauInf" instances="1">
            <q10Settings type="q10ExpTemp" q10Factor="2.3" experimentalTemp="21 degC"/>
            <timeCourse type="na__tauh_scale1__taum_scale1__vshifthmin9_60842__vshiftmmin10_9975__tauh_scale1__taum_scale1__vshifthmin9_60842__vshiftmmin10_9975__tauh_scale1__taum_scale1__vshifthmin9_60842__vshiftmmin10_9975__tauh_scale1__taum_scale1__vshifthmin9_60842__vshiftmmin10_9975_h_tau_tau"/>
            <steadyState type="na__tauh_scale1__taum_scale1__vshifthmin9_60842__vshiftmmin10_9975__tauh_scale1__taum_scale1__vshifthmin9_60842__vshiftmmin10_9975__tauh_scale1__taum_scale1__vshifthmin9_60842__vshiftmmin10_9975__tauh_scale1__taum_scale1__vshifthmin9_60842__vshiftmmin10_9975_h_inf_inf"/>
        </gate>

    </ionChannel>

    <ComponentType name="na__tauh_scale1__taum_scale1__vshifthmin9_60842__vshiftmmin10_9975__tauh_scale1__taum_scale1__vshifthmin9_60842__vshiftmmin10_9975__tauh_scale1__taum_scale1__vshifthmin9_60842__vshiftmmin10_9975__tauh_scale1__taum_scale1__vshifthmin9_60842__vshiftmmin10_9975_m_tau_tau" extends="baseVoltageDepTime">
        <Constant name="TIME_SCALE" dimension="time" value="1 ms"/>
        <Constant name="VOLT_SCALE" dimension="voltage" value="1 mV"/>
        <!--Note: this parameter (vshiftm) should ideally be defined only once within the ionChannel! Work in progress...-->
        <Constant name="vshiftm" dimension="none" value="-10.9975"/>
        <!--Note: this parameter (vshifth) should ideally be defined only once within the ionChannel! Work in progress...-->
        <Constant name="vshifth" dimension="none" value="-9.60842"/>
        <!--Note: this parameter (taum_scale) should ideally be defined only once within the ionChannel! Work in progress...-->
        <Constant name="taum_scale" dimension="none" value="1.0"/>
        <!--Note: this parameter (tauh_scale) should ideally be defined only once within the ionChannel! Work in progress...-->
        <Constant name="tauh_scale" dimension="none" value="1.0"/>
        <!--Note: this parameter (a1) should ideally be defined only once within the ionChannel! Work in progress...-->
        <Constant name="a1" dimension="none" value="0.058"/>
        <!--Note: this parameter (a2) should ideally be defined only once within the ionChannel! Work in progress...-->
        <Constant name="a2" dimension="none" value="0.114"/>
        <!--Note: this parameter (a3) should ideally be defined only once within the ionChannel! Work in progress...-->
        <Constant name="a3" dimension="none" value="-36"/>
        <!--Note: this parameter (a4) should ideally be defined only once within the ionChannel! Work in progress...-->
        <Constant name="a4" dimension="none" value="28"/>
        <!--Note: this parameter (v05m) should ideally be defined only once within the ionChannel! Work in progress...-->
        <Constant name="v05m" dimension="none" value="-38"/>
        <!--Note: this parameter (km) should ideally be defined only once within the ionChannel! Work in progress...-->
        <Constant name="km" dimension="none" value="10"/>
        <!--Note: this parameter (i1) should ideally be defined only once within the ionChannel! Work in progress...-->
        <Constant name="i1" dimension="none" value="0.28"/>
        <!--Note: this parameter (i2) should ideally be defined only once within the ionChannel! Work in progress...-->
        <Constant name="i2" dimension="none" value="16.7"/>
        <!--Note: this parameter (i3) should ideally be defined only once within the ionChannel! Work in progress...-->
        <Constant name="i3" dimension="none" value="-60"/>
        <!--Note: this parameter (i4) should ideally be defined only once within the ionChannel! Work in progress...-->
        <Constant name="i4" dimension="none" value="25"/>
        <!--Note: this parameter (v05h) should ideally be defined only once within the ionChannel! Work in progress...-->
        <Constant name="v05h" dimension="none" value="-66"/>
        <!--Note: this parameter (kh) should ideally be defined only once within the ionChannel! Work in progress...-->
        <Constant name="kh" dimension="none" value="-6"/>
        <!--Note: this parameter (temp) should ideally be defined only once within the ionChannel! Work in progress...-->
        <Constant name="temp" dimension="none" value="21"/>
        <!--Note: this parameter (q10) should ideally be defined only once within the ionChannel! Work in progress...-->
        <Constant name="q10" dimension="none" value="2.3"/>
        <!--Note: this parameter (vmin) should ideally be defined only once within the ionChannel! Work in progress...-->
        <Constant name="vmin" dimension="none" value="-120"/>
        <!--Note: this parameter (vmax) should ideally be defined only once within the ionChannel! Work in progress...-->
        <Constant name="vmax" dimension="none" value="100"/>

        <Dynamics>
            <DerivedVariable name="V" dimension="none" value="v / VOLT_SCALE"/>
            <DerivedVariable name="Vshiftm" dimension="none" value="vshiftm"/>
            <DerivedVariable name="Vshifth" dimension="none" value="vshifth"/>
            <DerivedVariable name="V05m" dimension="none" value="v05m"/>
            <DerivedVariable name="V05h" dimension="none" value="v05h"/>
            <DerivedVariable name="Vmin" dimension="none" value="vmin"/>
            <DerivedVariable name="Vmax" dimension="none" value="vmax"/>
            <DerivedVariable name="t" exposure="t" dimension="time" value="(a1+a2*exp(-((V+Vshiftm-a3)/a4)^2)) * TIME_SCALE"/>
        </Dynamics>

    </ComponentType>

    <ComponentType name="na__tauh_scale1__taum_scale1__vshifthmin9_60842__vshiftmmin10_9975__tauh_scale1__taum_scale1__vshifthmin9_60842__vshiftmmin10_9975__tauh_scale1__taum_scale1__vshifthmin9_60842__vshiftmmin10_9975__tauh_scale1__taum_scale1__vshifthmin9_60842__vshiftmmin10_9975_m_inf_inf" extends="baseVoltageDepVariable">
        <Constant name="TIME_SCALE" dimension="time" value="1 ms"/>
        <Constant name="VOLT_SCALE" dimension="voltage" value="1 mV"/>
        <!--Note: this parameter (vshiftm) should ideally be defined only once within the ionChannel! Work in progress...-->
        <Constant name="vshiftm" dimension="none" value="-10.9975"/>
        <!--Note: this parameter (vshifth) should ideally be defined only once within the ionChannel! Work in progress...-->
        <Constant name="vshifth" dimension="none" value="-9.60842"/>
        <!--Note: this parameter (taum_scale) should ideally be defined only once within the ionChannel! Work in progress...-->
        <Constant name="taum_scale" dimension="none" value="1.0"/>
        <!--Note: this parameter (tauh_scale) should ideally be defined only once within the ionChannel! Work in progress...-->
        <Constant name="tauh_scale" dimension="none" value="1.0"/>
        <!--Note: this parameter (a1) should ideally be defined only once within the ionChannel! Work in progress...-->
        <Constant name="a1" dimension="none" value="0.058"/>
        <!--Note: this parameter (a2) should ideally be defined only once within the ionChannel! Work in progress...-->
        <Constant name="a2" dimension="none" value="0.114"/>
        <!--Note: this parameter (a3) should ideally be defined only once within the ionChannel! Work in progress...-->
        <Constant name="a3" dimension="none" value="-36"/>
        <!--Note: this parameter (a4) should ideally be defined only once within the ionChannel! Work in progress...-->
        <Constant name="a4" dimension="none" value="28"/>
        <!--Note: this parameter (v05m) should ideally be defined only once within the ionChannel! Work in progress...-->
        <Constant name="v05m" dimension="none" value="-38"/>
        <!--Note: this parameter (km) should ideally be defined only once within the ionChannel! Work in progress...-->
        <Constant name="km" dimension="none" value="10"/>
        <!--Note: this parameter (i1) should ideally be defined only once within the ionChannel! Work in progress...-->
        <Constant name="i1" dimension="none" value="0.28"/>
        <!--Note: this parameter (i2) should ideally be defined only once within the ionChannel! Work in progress...-->
        <Constant name="i2" dimension="none" value="16.7"/>
        <!--Note: this parameter (i3) should ideally be defined only once within the ionChannel! Work in progress...-->
        <Constant name="i3" dimension="none" value="-60"/>
        <!--Note: this parameter (i4) should ideally be defined only once within the ionChannel! Work in progress...-->
        <Constant name="i4" dimension="none" value="25"/>
        <!--Note: this parameter (v05h) should ideally be defined only once within the ionChannel! Work in progress...-->
        <Constant name="v05h" dimension="none" value="-66"/>
        <!--Note: this parameter (kh) should ideally be defined only once within the ionChannel! Work in progress...-->
        <Constant name="kh" dimension="none" value="-6"/>
        <!--Note: this parameter (temp) should ideally be defined only once within the ionChannel! Work in progress...-->
        <Constant name="temp" dimension="none" value="21"/>
        <!--Note: this parameter (q10) should ideally be defined only once within the ionChannel! Work in progress...-->
        <Constant name="q10" dimension="none" value="2.3"/>
        <!--Note: this parameter (vmin) should ideally be defined only once within the ionChannel! Work in progress...-->
        <Constant name="vmin" dimension="none" value="-120"/>
        <!--Note: this parameter (vmax) should ideally be defined only once within the ionChannel! Work in progress...-->
        <Constant name="vmax" dimension="none" value="100"/>

        <Dynamics>
            <DerivedVariable name="V" dimension="none" value="v / VOLT_SCALE"/>
            <DerivedVariable name="Vshiftm" dimension="none" value="vshiftm"/>
            <DerivedVariable name="Vshifth" dimension="none" value="vshifth"/>
            <DerivedVariable name="V05m" dimension="none" value="v05m"/>
            <DerivedVariable name="V05h" dimension="none" value="v05h"/>
            <DerivedVariable name="Vmin" dimension="none" value="vmin"/>
            <DerivedVariable name="Vmax" dimension="none" value="vmax"/>
            <DerivedVariable name="x" exposure="x" dimension="none" value="1/(1+exp(-(V+Vshiftm-V05m)/km))"/>
        </Dynamics>

    </ComponentType>

    <ComponentType name="na__tauh_scale1__taum_scale1__vshifthmin9_60842__vshiftmmin10_9975__tauh_scale1__taum_scale1__vshifthmin9_60842__vshiftmmin10_9975__tauh_scale1__taum_scale1__vshifthmin9_60842__vshiftmmin10_9975__tauh_scale1__taum_scale1__vshifthmin9_60842__vshiftmmin10_9975_h_tau_tau" extends="baseVoltageDepTime">
        <Constant name="TIME_SCALE" dimension="time" value="1 ms"/>
        <Constant name="VOLT_SCALE" dimension="voltage" value="1 mV"/>
        <!--Note: this parameter (vshiftm) should ideally be defined only once within the ionChannel! Work in progress...-->
        <Constant name="vshiftm" dimension="none" value="-10.9975"/>
        <!--Note: this parameter (vshifth) should ideally be defined only once within the ionChannel! Work in progress...-->
        <Constant name="vshifth" dimension="none" value="-9.60842"/>
        <!--Note: this parameter (taum_scale) should ideally be defined only once within the ionChannel! Work in progress...-->
        <Constant name="taum_scale" dimension="none" value="1.0"/>
        <!--Note: this parameter (tauh_scale) should ideally be defined only once within the ionChannel! Work in progress...-->
        <Constant name="tauh_scale" dimension="none" value="1.0"/>
        <!--Note: this parameter (a1) should ideally be defined only once within the ionChannel! Work in progress...-->
        <Constant name="a1" dimension="none" value="0.058"/>
        <!--Note: this parameter (a2) should ideally be defined only once within the ionChannel! Work in progress...-->
        <Constant name="a2" dimension="none" value="0.114"/>
        <!--Note: this parameter (a3) should ideally be defined only once within the ionChannel! Work in progress...-->
        <Constant name="a3" dimension="none" value="-36"/>
        <!--Note: this parameter (a4) should ideally be defined only once within the ionChannel! Work in progress...-->
        <Constant name="a4" dimension="none" value="28"/>
        <!--Note: this parameter (v05m) should ideally be defined only once within the ionChannel! Work in progress...-->
        <Constant name="v05m" dimension="none" value="-38"/>
        <!--Note: this parameter (km) should ideally be defined only once within the ionChannel! Work in progress...-->
        <Constant name="km" dimension="none" value="10"/>
        <!--Note: this parameter (i1) should ideally be defined only once within the ionChannel! Work in progress...-->
        <Constant name="i1" dimension="none" value="0.28"/>
        <!--Note: this parameter (i2) should ideally be defined only once within the ionChannel! Work in progress...-->
        <Constant name="i2" dimension="none" value="16.7"/>
        <!--Note: this parameter (i3) should ideally be defined only once within the ionChannel! Work in progress...-->
        <Constant name="i3" dimension="none" value="-60"/>
        <!--Note: this parameter (i4) should ideally be defined only once within the ionChannel! Work in progress...-->
        <Constant name="i4" dimension="none" value="25"/>
        <!--Note: this parameter (v05h) should ideally be defined only once within the ionChannel! Work in progress...-->
        <Constant name="v05h" dimension="none" value="-66"/>
        <!--Note: this parameter (kh) should ideally be defined only once within the ionChannel! Work in progress...-->
        <Constant name="kh" dimension="none" value="-6"/>
        <!--Note: this parameter (temp) should ideally be defined only once within the ionChannel! Work in progress...-->
        <Constant name="temp" dimension="none" value="21"/>
        <!--Note: this parameter (q10) should ideally be defined only once within the ionChannel! Work in progress...-->
        <Constant name="q10" dimension="none" value="2.3"/>
        <!--Note: this parameter (vmin) should ideally be defined only once within the ionChannel! Work in progress...-->
        <Constant name="vmin" dimension="none" value="-120"/>
        <!--Note: this parameter (vmax) should ideally be defined only once within the ionChannel! Work in progress...-->
        <Constant name="vmax" dimension="none" value="100"/>

        <Dynamics>
            <DerivedVariable name="V" dimension="none" value="v / VOLT_SCALE"/>
            <DerivedVariable name="Vshiftm" dimension="none" value="vshiftm"/>
            <DerivedVariable name="Vshifth" dimension="none" value="vshifth"/>
            <DerivedVariable name="V05m" dimension="none" value="v05m"/>
            <DerivedVariable name="V05h" dimension="none" value="v05h"/>
            <DerivedVariable name="Vmin" dimension="none" value="vmin"/>
            <DerivedVariable name="Vmax" dimension="none" value="vmax"/>
            <DerivedVariable name="t" exposure="t" dimension="time" value="(i1+i2*exp(-((V+Vshifth-i3)/i4)^2)) * TIME_SCALE"/>
        </Dynamics>

    </ComponentType>

    <ComponentType name="na__tauh_scale1__taum_scale1__vshifthmin9_60842__vshiftmmin10_9975__tauh_scale1__taum_scale1__vshifthmin9_60842__vshiftmmin10_9975__tauh_scale1__taum_scale1__vshifthmin9_60842__vshiftmmin10_9975__tauh_scale1__taum_scale1__vshifthmin9_60842__vshiftmmin10_9975_h_inf_inf" extends="baseVoltageDepVariable">
        <Constant name="TIME_SCALE" dimension="time" value="1 ms"/>
        <Constant name="VOLT_SCALE" dimension="voltage" value="1 mV"/>
        <!--Note: this parameter (vshiftm) should ideally be defined only once within the ionChannel! Work in progress...-->
        <Constant name="vshiftm" dimension="none" value="-10.9975"/>
        <!--Note: this parameter (vshifth) should ideally be defined only once within the ionChannel! Work in progress...-->
        <Constant name="vshifth" dimension="none" value="-9.60842"/>
        <!--Note: this parameter (taum_scale) should ideally be defined only once within the ionChannel! Work in progress...-->
        <Constant name="taum_scale" dimension="none" value="1.0"/>
        <!--Note: this parameter (tauh_scale) should ideally be defined only once within the ionChannel! Work in progress...-->
        <Constant name="tauh_scale" dimension="none" value="1.0"/>
        <!--Note: this parameter (a1) should ideally be defined only once within the ionChannel! Work in progress...-->
        <Constant name="a1" dimension="none" value="0.058"/>
        <!--Note: this parameter (a2) should ideally be defined only once within the ionChannel! Work in progress...-->
        <Constant name="a2" dimension="none" value="0.114"/>
        <!--Note: this parameter (a3) should ideally be defined only once within the ionChannel! Work in progress...-->
        <Constant name="a3" dimension="none" value="-36"/>
        <!--Note: this parameter (a4) should ideally be defined only once within the ionChannel! Work in progress...-->
        <Constant name="a4" dimension="none" value="28"/>
        <!--Note: this parameter (v05m) should ideally be defined only once within the ionChannel! Work in progress...-->
        <Constant name="v05m" dimension="none" value="-38"/>
        <!--Note: this parameter (km) should ideally be defined only once within the ionChannel! Work in progress...-->
        <Constant name="km" dimension="none" value="10"/>
        <!--Note: this parameter (i1) should ideally be defined only once within the ionChannel! Work in progress...-->
        <Constant name="i1" dimension="none" value="0.28"/>
        <!--Note: this parameter (i2) should ideally be defined only once within the ionChannel! Work in progress...-->
        <Constant name="i2" dimension="none" value="16.7"/>
        <!--Note: this parameter (i3) should ideally be defined only once within the ionChannel! Work in progress...-->
        <Constant name="i3" dimension="none" value="-60"/>
        <!--Note: this parameter (i4) should ideally be defined only once within the ionChannel! Work in progress...-->
        <Constant name="i4" dimension="none" value="25"/>
        <!--Note: this parameter (v05h) should ideally be defined only once within the ionChannel! Work in progress...-->
        <Constant name="v05h" dimension="none" value="-66"/>
        <!--Note: this parameter (kh) should ideally be defined only once within the ionChannel! Work in progress...-->
        <Constant name="kh" dimension="none" value="-6"/>
        <!--Note: this parameter (temp) should ideally be defined only once within the ionChannel! Work in progress...-->
        <Constant name="temp" dimension="none" value="21"/>
        <!--Note: this parameter (q10) should ideally be defined only once within the ionChannel! Work in progress...-->
        <Constant name="q10" dimension="none" value="2.3"/>
        <!--Note: this parameter (vmin) should ideally be defined only once within the ionChannel! Work in progress...-->
        <Constant name="vmin" dimension="none" value="-120"/>
        <!--Note: this parameter (vmax) should ideally be defined only once within the ionChannel! Work in progress...-->
        <Constant name="vmax" dimension="none" value="100"/>

        <Dynamics>
            <DerivedVariable name="V" dimension="none" value="v / VOLT_SCALE"/>
            <DerivedVariable name="Vshiftm" dimension="none" value="vshiftm"/>
            <DerivedVariable name="Vshifth" dimension="none" value="vshifth"/>
            <DerivedVariable name="V05m" dimension="none" value="v05m"/>
            <DerivedVariable name="V05h" dimension="none" value="v05h"/>
            <DerivedVariable name="Vmin" dimension="none" value="vmin"/>
            <DerivedVariable name="Vmax" dimension="none" value="vmax"/>
            <DerivedVariable name="x" exposure="x" dimension="none" value="1/(1+exp(-(V+Vshifth-V05h)/kh))"/>
        </Dynamics>

    </ComponentType>

</neuroml>
